# LAMMPS input generated from LammpsInputFile with pymatgen v2025.10.7

# STYLES
units metal
atom_style atomic

# SET UP CALCULATION
read_data starting_config.dat
# ----- create 9 additional vacancies (total 10) -----
# starting_config.dat already has 1 vacancy → 512 − 10 = 502 atoms
variable      Nv equal 9
delete_atoms  random count ${Nv} no all NULL 34567
# ----------------------------------------------------

pair_style sw
pair_coeff * * Si.sw Si
velocity all create 1000 2201697

# CALCULATION PARAMETERS
fix f1 all nvt temp 1000.0 1000.0 $(100.0*dt)
thermo 10000

# RUN CALC AND WRITE OUTPUTS
dump d1 all custom 100 state_dump id type x y z vx vy vz
run 10000000
write_data FINAL_STRUCTURE
